# LAMMPS NVT bulk equilibration — Hastelloy N + H
# T = 1000 K | Notebook 10
# Phase 1: 1000 ps equilibration
# Phase 2: 2500 ps production (trajectory for NB11 MSD)

units          metal
atom_style     atomic
newton         on
boundary       p p p

read_data      /projects/westgroup/akinyemi.az/mace_lammps/MHI_Nickel/calculation/results/Hastelloy_N_7_supercell_1H/structures/1000K/bulk_min_h.lammps

restart        100000  /projects/westgroup/akinyemi.az/mace_lammps/MHI_Nickel/calculation/results/Hastelloy_N_7_supercell_1H/results/1000K/checkpoints/nvt_1000K.*.restart

pair_style     mliap unified /projects/westgroup/akinyemi.az/mace_lammps/models/mace-mh-1.model-mliap_lammps.pt 0
pair_coeff     * * Al B C Cr Fe Mo Ni H

neighbor       2.0 bin
neigh_modify   every 1 delay 0 check yes

group          H_atom  type 8
group          metal   subtract all H_atom

thermo         1000
thermo_style   custom step temp pe ke etotal press vol

timestep       0.0005

velocity       all create 1000.0 42 mom yes rot yes dist gaussian

# ═══ PHASE 1: Equilibration (1000 ps) ═══════════════════════════
fix            nvt_equil  all  nvt  temp  1000.0  1000.0  0.1

dump           equil_dump  all  custom  1000  /projects/westgroup/akinyemi.az/mace_lammps/MHI_Nickel/calculation/results/Hastelloy_N_7_supercell_1H/results/1000K/nvt_1000K_phase1_equil.lammpstrj  id type x y z
dump_modify    equil_dump  sort id

print "### Phase 1: Equilibration 1000 ps at 1000 K ###"
run            2000000
undump         equil_dump
unfix          nvt_equil
print "### Phase 1 complete ###"

write_restart  /projects/westgroup/akinyemi.az/mace_lammps/MHI_Nickel/calculation/results/Hastelloy_N_7_supercell_1H/results/1000K/nvt_1000K_phase1_equil.restart
write_data     /projects/westgroup/akinyemi.az/mace_lammps/MHI_Nickel/calculation/results/Hastelloy_N_7_supercell_1H/results/1000K/nvt_1000K_phase1_equil.lammps

# ═══ PHASE 2: Production (2500 ps) ════════════════════════════════
dump           prod_dump  all  custom  1000  /projects/westgroup/akinyemi.az/mace_lammps/MHI_Nickel/calculation/results/Hastelloy_N_7_supercell_1H/results/1000K/nvt_1000K.dump &
               id type x y z
dump_modify    prod_dump  sort id

fix            nvt_prod  all  nvt  temp  1000.0  1000.0  0.1

compute        msd_H    H_atom  msd
fix            msd_out  all  ave/time  1  1  1000 &
               c_msd_H[4]  file  /projects/westgroup/akinyemi.az/mace_lammps/MHI_Nickel/calculation/results/Hastelloy_N_7_supercell_1H/results/1000K/msd_1000K.dat  mode scalar

print "### Phase 2: Production 2500 ps at 1000 K ###"
run            5000000
print "### Phase 2 complete ###"

variable  pe_final   equal  pe
variable  temp_fin   equal  temp
variable  press_fin  equal  press

print "EQUIL_RESULTS_START"
print "  T_K          : 1000"
print "  pe_final_eV  : ${pe_final}"
print "  temp_final_K : ${temp_fin}"
print "  press_final  : ${press_fin}"
print "EQUIL_RESULTS_END"

write_restart  /projects/westgroup/akinyemi.az/mace_lammps/MHI_Nickel/calculation/results/Hastelloy_N_7_supercell_1H/results/1000K/nvt_1000K_phase2_prod.restart
write_data     /projects/westgroup/akinyemi.az/mace_lammps/MHI_Nickel/calculation/results/Hastelloy_N_7_supercell_1H/results/1000K/nvt_1000K.out
