# ═══════════════════════════════════════════════════════
# LAMMPS Surface Relaxation RESTART — Phase 3 NVT only
# T = 300 K | boundary p p f (continuation leg)
# Reads latest periodic restart; appends to existing trajectory
# ═══════════════════════════════════════════════════════

units          metal
atom_style     atomic
newton         on
boundary       p p f

# Velocities and thermostat state are restored from the checkpoint.
# No velocity command needed.
read_restart   /projects/westgroup/akinyemi.az/mace_lammps/MHI_Nickel/calculation/slabs/phase2_relax/restarts/surf_300K.*.restart

restart        10000  /projects/westgroup/akinyemi.az/mace_lammps/MHI_Nickel/calculation/slabs/phase2_relax/restarts/surf_300K.*.restart

pair_style     mliap unified /projects/westgroup/akinyemi.az/mace_lammps/models/mace-mh-1.model-mliap_lammps.pt 0
pair_coeff     * * Al B C Cr Fe Mo Ni H

neighbor       2.0 bin
neigh_modify   every 1 delay 0 check yes

# ── Frozen layers (z ≤ 22.115 Å) ────────────────────────────────
region         frozen_reg    block  INF INF  INF INF  EDGE  22.115
group          frozen_atoms  region  frozen_reg
group          free_atoms    subtract  all  frozen_atoms

fix            freeze  frozen_atoms  setforce  0.0  0.0  0.0

thermo         1000
thermo_style   custom  step  time  temp  pe  ke  press  lx  ly  lz

timestep       0.0005

# ═══ PHASE 3: NVT Equilibration at 300 K (restart) ════════
print "### Phase 3 NVT restart at 300 K ###"

compute        surf_temp  free_atoms  temp
thermo_modify  temp  surf_temp

# append yes — rows continue from where the previous leg stopped
fix            thermo_out  all  ave/time  1  1  1000  &
               c_surf_temp  &
               file  /projects/westgroup/akinyemi.az/mace_lammps/MHI_Nickel/calculation/slabs/phase2_relax/relax_thermo.txt  mode scalar  append yes

# append yes — frames added after those from the previous leg
dump           surf_traj  free_atoms  custom  1000  /projects/westgroup/akinyemi.az/mace_lammps/MHI_Nickel/calculation/slabs/phase2_relax/relaxed_slab_nvt_traj.lammpstrj  id type x y z
dump_modify    surf_traj  sort id  append yes

fix            nvt_equil  free_atoms  nvt  temp  300.0  300.0  0.1
run            100000
unfix          nvt_equil
undump         surf_traj
unfix          thermo_out
print "### Phase 3 restart complete ###"

write_restart  /projects/westgroup/akinyemi.az/mace_lammps/MHI_Nickel/calculation/slabs/phase2_relax/relaxed_slab_phase3_nvt.restart
write_data     /projects/westgroup/akinyemi.az/mace_lammps/MHI_Nickel/calculation/slabs/phase2_relax/relaxed_slab_phase3_nvt.lammps

# ═══ PHASE 4: Quench (CG minimization of NVT snapshot) ══════════
print "### Phase 4: Quench minimization ###"

variable       z_top_after_nvt  equal  bound(free_atoms,zmax)
print "  z top BEFORE quench: ${z_top_after_nvt} Ang"

dump           quench_traj  free_atoms  custom  1000  /projects/westgroup/akinyemi.az/mace_lammps/MHI_Nickel/calculation/slabs/phase2_relax/relaxed_slab_phase4_quench_traj.lammpstrj  id type x y z
dump_modify    quench_traj  sort id

minimize       0.0  1e-06  10000  100000

undump         quench_traj
print "### Phase 4 complete ###"

# ═══ Results ═════════════════════════════════════════════════════
variable       z_top_final   equal  bound(free_atoms,zmax)
variable       pe_final_val  equal  pe

print "RELAXATION_RESULTS_START"
print "  z_top_after_nvt_Ang    : ${z_top_after_nvt}"
print "  z_top_after_quench_Ang : ${z_top_final}"
print "  pe_final_eV            : ${pe_final_val}"
print "RELAXATION_RESULTS_END"

unfix          freeze
write_restart  /projects/westgroup/akinyemi.az/mace_lammps/MHI_Nickel/calculation/slabs/phase2_relax/relaxed_slab_phase4_quench.restart
write_data     /projects/westgroup/akinyemi.az/mace_lammps/MHI_Nickel/calculation/slabs/phase2_relax/relaxed_slab.lammps
print "Relaxed slab written: /projects/westgroup/akinyemi.az/mace_lammps/MHI_Nickel/calculation/slabs/phase2_relax/relaxed_slab.lammps"
