# ═══════════════════════════════════════════════════════
# LAMMPS Surface Relaxation — Hastelloy N (12345)
# Notebook 04 | Protocol: freeze → minimize → NVT
# Refs: [3,4,5,12,13,14,15,16]
# ═══════════════════════════════════════════════════════

units          metal
atom_style     atomic
newton         on
boundary       p p f

read_data      structures/notebook03-Slab-generation/12345/hastelloy_12345_slab.lammps

# ── Restart Settings ─────────────────────────────────────────
# Automatically save every 10,000 steps.
# Using % ensures parallel I/O efficiency for GPU/MPI runs.
restart        10000 results/notebook04-surface-relaxation/12345/Hastelloy_N_12345_300K.*.restart

pair_style     mliap unified /projects/westgroup/akinyemi.az/mace_lammps/models/mace-mp-0b2-medium.model-mliap_lammps.pt 0
pair_coeff     * * Al B C Cr Fe Mo Ni H

neighbor       2.0 bin
neigh_modify   every 1 delay 0 check yes

region         frozen_reg  block  INF INF  INF INF  EDGE  22.115
group          frozen_atoms  region  frozen_reg
group          free_atoms    subtract  all  frozen_atoms

variable       frozen_count  equal  count(frozen_atoms)
variable       free_count    equal  count(free_atoms)
print "GROUPS: frozen=${frozen_count}  free=${free_count}"

fix            freeze  frozen_atoms  setforce  0.0  0.0  0.0

thermo         200
thermo_style   custom  step  time  temp  pe  ke  press  lx  ly  lz

# ═══ PHASE 1: Minimization ═══════════════════════════════
print "### Phase 1: Surface minimization ###"

variable       z_top_before  equal  bound(free_atoms,zmax)
print "  Top layer z BEFORE minimize: ${z_top_before} Ang"

minimize       0  1e-06  10000  100000

variable       z_top_after_min  equal  bound(free_atoms,zmax)
variable       dz_min           equal  v_z_top_before - v_z_top_after_min
print "  Top layer z AFTER minimize : ${z_top_after_min} Ang"
print "  Surface contraction (min)  : ${dz_min} Ang"
print "### Minimization complete ###"

# ═══ PHASE 2: Heat to 300 K via velocity rescaling ════
print "### Phase 2: Heating to 300 K ###"

velocity       free_atoms  create  300.0  12345  mom yes  rot yes  dist gaussian
velocity       free_atoms  scale   300.0

timestep       0.0005

compute        surf_temp_heat  free_atoms  temp
thermo_modify  temp  surf_temp_heat

fix            nve_heat    free_atoms  nve
fix            rescale     free_atoms  temp/rescale  10  300.0  300.0  10.0  1.0
run            20000
unfix          rescale
unfix          nve_heat
uncompute      surf_temp_heat
print "### Heating complete ###"

# ═══ PHASE 3: NVT Equilibration at 300 K ══════════════
print "### Phase 3: NVT equilibration at 300 K ###"

compute        surf_temp  free_atoms  temp
thermo_modify  temp  surf_temp

fix            thermo_out  all  ave/time  1  1  200  &
               c_surf_temp  &
               file  results/notebook04-surface-relaxation/12345/relax_thermo.txt  mode scalar

fix            nvt_equil  free_atoms  nvt  temp  300.0  300.0  50
run            200000
unfix          nvt_equil
unfix          thermo_out
print "### Equilibration complete ###"

# ═══ Results ══════════════════════════════════════════════
variable       z_top_final   equal  bound(free_atoms,zmax)
variable       pe_final_val  equal  pe

print "RELAXATION_RESULTS_START"
print "  z_top_before_Ang     : ${z_top_before} Ang"
print "  z_top_after_min_Ang  : ${z_top_after_min} Ang"
print "  surface_contraction  : ${dz_min} Ang"
print "  z_top_after_nvt_Ang  : ${z_top_final}"
print "  pe_final_eV          : ${pe_final_val}"
print "RELAXATION_RESULTS_END"

unfix          freeze
write_restart results/notebook04-surface-relaxation/12345/Hastelloy_N_12345_300K_final.restart
write_data     structures/notebook04-surface-relaxation/12345/hastelloy_12345_slab_relaxed.lammps
print "Relaxed slab written: structures/notebook04-surface-relaxation/12345/hastelloy_12345_slab_relaxed.lammps"
