units metal
atom_style atomic
newton on
boundary p p f

read_data      structures/notebook06-Neb-dissociation/12345/h_atom_fcc_hollow.lammps

pair_style     mliap unified /projects/westgroup/akinyemi.az/mace_lammps/models/mace-mp-0b2-medium.model-mliap_lammps.pt 0
pair_coeff     * * Al B C Cr Fe Mo Ni H

neighbor       2.0 bin
neigh_modify   every 1 delay 0 check yes

region         frozen_reg  block  INF INF  INF INF  EDGE  22.115
group          frozen_atoms  region  frozen_reg
group          free_atoms    subtract  all  frozen_atoms
fix            freeze  frozen_atoms  setforce  0.0  0.0  0.0

thermo         50
thermo_style   custom step pe fmax

minimize       0  1e-06  10000  100000

variable  pe_final  equal  pe
variable  fmax_f    equal  fmax
variable  natoms    equal  atoms

print "ENERGY_RESULTS_START"
print "  job_name         : h_atom_fcc_hollow"
print "  pe_final_eV      : ${pe_final}"
print "  fmax_eV_per_Ang  : ${fmax_f}"
print "  natoms           : ${natoms}"
print "ENERGY_RESULTS_END"

write_data     structures/notebook06-Neb-dissociation/12345/h_atom_fcc_hollow_relaxed.lammps
