# LAMMPS NVT bulk equilibration — Hastelloy N + H
# T = 700 K | Notebook 10
# Phase 1: 0 ps equilibration
# Phase 2: 2 ps production (trajectory for NB11 MSD)

units          metal
atom_style     atomic
newton         on
boundary       p p p

read_data      /projects/westgroup/akinyemi.az/mace_lammps/MHI_Nickel/tests/pipeline/work/diffusivity/results/ni_bulk_test_1H/structures/700K/bulk_min_h.lammps

restart        1000  /projects/westgroup/akinyemi.az/mace_lammps/MHI_Nickel/tests/pipeline/work/diffusivity/results/ni_bulk_test_1H/results/700K/checkpoints/nvt_700K.*.restart

pair_style     mliap unified /projects/westgroup/akinyemi.az/mace_lammps/models/mace-mh-1.model-mliap_lammps.pt 0
pair_coeff     * * Al B C Cr Fe Mo Ni H

neighbor       2.0 bin
neigh_modify   every 1 delay 0 check yes

group          H_atom  type 8
group          metal   subtract all H_atom

thermo         100
thermo_style   custom step temp pe ke etotal press vol

timestep       0.001

velocity       all create 700.0 12345 mom yes rot yes dist gaussian

# ═══ PHASE 1: Equilibration (0 ps) ═══════════════════════════
fix            nvt_equil  all  nvt  temp  700.0  700.0  0.1

dump           equil_dump  all  custom  100  /projects/westgroup/akinyemi.az/mace_lammps/MHI_Nickel/tests/pipeline/work/diffusivity/results/ni_bulk_test_1H/results/700K/nvt_700K_phase1_equil.lammpstrj  id type x y z
dump_modify    equil_dump  sort id

compute        msd_H      H_atom  msd
fix            msd_equil  all  ave/time  1  1  100 &
               c_msd_H[4]  file  /projects/westgroup/akinyemi.az/mace_lammps/MHI_Nickel/tests/pipeline/work/diffusivity/results/ni_bulk_test_1H/results/700K/msd_700K_equil.dat  mode scalar

print "### Phase 1: Equilibration 0 ps at 700 K ###"
run            500
unfix          msd_equil
uncompute      msd_H
undump         equil_dump
unfix          nvt_equil
print "### Phase 1 complete ###"

write_restart  /projects/westgroup/akinyemi.az/mace_lammps/MHI_Nickel/tests/pipeline/work/diffusivity/results/ni_bulk_test_1H/results/700K/nvt_700K_phase1_equil.restart
write_data     /projects/westgroup/akinyemi.az/mace_lammps/MHI_Nickel/tests/pipeline/work/diffusivity/results/ni_bulk_test_1H/results/700K/nvt_700K_phase1_equil.lammps

# ═══ PHASE 2: Production (2 ps) ════════════════════════════════
dump           prod_dump  all  custom  100  /projects/westgroup/akinyemi.az/mace_lammps/MHI_Nickel/tests/pipeline/work/diffusivity/results/ni_bulk_test_1H/results/700K/nvt_700K.dump &
               id type x y z
dump_modify    prod_dump  sort id

fix            nvt_prod  all  nvt  temp  700.0  700.0  0.1

compute        msd_H     H_atom  msd
fix            msd_prod  all  ave/time  1  1  100 &
               c_msd_H[4]  file  /projects/westgroup/akinyemi.az/mace_lammps/MHI_Nickel/tests/pipeline/work/diffusivity/results/ni_bulk_test_1H/results/700K/msd_700K_prod.dat  mode scalar

print "### Phase 2: Production 2 ps at 700 K ###"
run            2000
print "### Phase 2 complete ###"

variable  pe_final   equal  pe
variable  temp_fin   equal  temp
variable  press_fin  equal  press

print "EQUIL_RESULTS_START"
print "  T_K          : 700"
print "  pe_final_eV  : ${pe_final}"
print "  temp_final_K : ${temp_fin}"
print "  press_final  : ${press_fin}"
print "EQUIL_RESULTS_END"

write_restart  /projects/westgroup/akinyemi.az/mace_lammps/MHI_Nickel/tests/pipeline/work/diffusivity/results/ni_bulk_test_1H/results/700K/nvt_700K_phase2_prod.restart
write_data     /projects/westgroup/akinyemi.az/mace_lammps/MHI_Nickel/tests/pipeline/work/diffusivity/results/ni_bulk_test_1H/results/700K/nvt_700K.out
