# ════════════════════════════════════════════════════
# LAMMPS NPT — Lattice Parameter at 700 K
# Notebook 02
# ════════════════════════════════════════════════════

units          metal
atom_style     atomic
newton         on
boundary       p p p

read_data      /projects/westgroup/akinyemi.az/mace_lammps/MHI_Nickel/tests/pipeline/work/diffusivity/results/ni_bulk_test_1H/structures/bulk_min.lammps


pair_style     mliap unified /projects/westgroup/akinyemi.az/mace_lammps/models/mace-mh-1.model-mliap_lammps.pt 0
pair_coeff     * * Al B C Cr Fe Mo Ni H

neighbor       2.0 bin
neigh_modify   every 1 delay 0 check yes

timestep       0.001

velocity       all create 10.0 12345 mom yes rot yes dist gaussian

thermo         100
thermo_style   custom step time temp pe ke press vol lx ly lz

# ── Stage 1: Heat 10 K → 700 K over 0 ps ──────────────
fix            heat all npt temp 10.0 700.0 0.1 &
               iso 0.0 0.0 1.0
run            500
unfix          heat
print "### Heating complete ###"

write_restart  /projects/westgroup/akinyemi.az/mace_lammps/MHI_Nickel/tests/pipeline/work/diffusivity/results/ni_bulk_test_1H/structures/npt_boxdims_700K_after_heat.restart
write_data     /projects/westgroup/akinyemi.az/mace_lammps/MHI_Nickel/tests/pipeline/work/diffusivity/results/ni_bulk_test_1H/structures/bulk_min_npt_after_heat.lammps

# ── Stage 2: NPT production at 700 K (0 ps) ────────────
fix            npt_run all npt temp 700.0 700.0 0.1 &
               iso 0.0 0.0 1.0

variable       lx_val  equal  lx
variable       ly_val  equal  ly
variable       lz_val  equal  lz
fix            boxdump all ave/time 1 1 100 v_lx_val v_ly_val v_lz_val &
               file /projects/westgroup/akinyemi.az/mace_lammps/MHI_Nickel/tests/pipeline/work/diffusivity/results/ni_bulk_test_1H/structures/npt_boxdims_700K.dat

run            500

unfix          npt_run
unfix          boxdump
print "### NPT complete at 700 K ###"

variable       a0_npt  equal  lx/5.0
print "NPT_RESULT: a0_at_700K = ${a0_npt} Angstrom"

write_restart  /projects/westgroup/akinyemi.az/mace_lammps/MHI_Nickel/tests/pipeline/work/diffusivity/results/ni_bulk_test_1H/structures/npt_boxdims_700K_final.restart
write_data     /projects/westgroup/akinyemi.az/mace_lammps/MHI_Nickel/tests/pipeline/work/diffusivity/results/ni_bulk_test_1H/structures/bulk_min_npt_final_700K.lammps
